// COMSOL Multiphysics 5.2.0.166 model "CDE_uwDG.mph"
// CDE uwDG
// Outline of the model tree

Functions
  an1: Analytic | funcname = f; expr = 0; args = {x, y}
  an2: Analytic | funcname = g; expr = sin(0.5*pi*(x-2*y)); args = {x, y}
  an3: Analytic | funcname = w; expr = 0; args = {x, y}

Variables
  var1 "Variables 1"
    MU = 0.001
    BETA1 = 2
    BETA2 = 1
    flag = if(BETA1*nx+BETA2*ny>=0,1,0)

Geometry
  geom1 "Geometry 1" (2D, length unit m)
    r1: Rectangle | size = {3, 1}
    fin: Finalize "Form Union"

Physics
  w: WeakFormPDE on all domains
    dependent variable u
    ShapeProperty.shapeFunctionType = shdisc
    ShapeProperty.order = 1
    wfeq1: WeakFormPDE (default) | weak = MU*(ux*test(ux)+uy*test(uy))-u*(BETA1*test(ux)+BETA2*test(uy))-f(x,y)*test(u)
    zflx1: ZeroFluxBoundary "Zero Flux 1" (default)
    init1: init "Initial Values 1" (default)
    ibweak1: InteriorBoundaryContribution "Weak Contribution on Mesh Boundaries 1" on domains 1
      weakExpression = if(BETA1*nx+BETA2*ny>=0,(BETA1*nx+BETA2*ny)*down(u)*(down(test(u))-up(test(u))),(BETA1*nx+BETA2*ny)*up(u)*(down(test(u))-up(test(u))))
    ibweak2: InteriorBoundaryContribution "Weak Contribution on Mesh Boundaries 2" on domains 1
      weakExpression = -MU*if(BETA1*nx+BETA2*ny>=0,(down(ux)*nx+down(uy)*ny)*(down(test(u))-up(test(u))), (up(ux)*nx+up(uy)*ny)*(down(test(u))-up(test(u))))
    weak1: WeakContribution on all boundaries
      integrationOrder = 4
      quadratureFrame = spatial
      weakExpression = 1000*if(BETA1*nx+BETA2*ny>=0,(BETA1*nx+BETA2*ny)*(down(u)-w(x,y))*test(u),0)
      automaticQuadrature = 1
    weak2: WeakContribution on all boundaries
      integrationOrder = 4
      quadratureFrame = spatial
      weakExpression = -MU*(down(ux)*nx+down(uy)*ny)*test(u)
      automaticQuadrature = 1
    weak3: WeakContribution on all boundaries
      integrationOrder = 4
      quadratureFrame = spatial
      weakExpression = if(BETA1*nx+BETA2*ny<0,(BETA1*nx+BETA2*ny)*g(x,y)*test(u),0)
      automaticQuadrature = 1
  cdeq: ConvectionDiffusionEquation on all domains
    dependent variable u2
    ShapeProperty.order = 1
    cdeq1: ConvectionDiffusionEquation (default) | f = 0; c = {MU, 0, 0, MU}; be = {2, 1}; da = 0
    zflx1: ZeroFluxBoundary "Zero Flux 1" (default)
    init1: init "Initial Values 1" (default)
    dir1: DirichletBoundary "Dirichlet Boundary Condition 1" on boundaries 1, 2 | r = g(x,y)
    dir2: DirichletBoundary "Dirichlet Boundary Condition 2" on boundaries 3, 4 | r = 0

Mesh
  mesh1 "Mesh 1" (physics-controlled)
    size: MeshSizeDefault | hauto = 1

Studies
  std1 "Study 1"
    stat: Stationary | physselection = w; solve for = {w}
  std2 "Study 2"
    stat: Stationary | physselection = w; solve for = {cdeq}

Solver configurations
  sol1 "Solver 1" (study std1)
    v1: Variables "Dependent Variables 1"
    s1: Stationary "Stationary Solver 1"
      dDef: Direct
      fc1: FullyCoupled | linsolver = dDef
  sol2 "Solver 2" (study std2)
    // same settings as sol1

Datasets
  dset1: Solution | solution = sol1
  dset2: Solution | solution = sol2

Plots
  pg1: PlotGroup2D "2D Plot Group 1" | data = dset1
    surf1: Surface | expr = u
      hght1: Height "Height Expression 1" (disabled) | expr = u
  pg2: PlotGroup2D "2D Plot Group 2" | data = dset2
    surf1: Surface | expr = u2
      hght1: Height "Height Expression 1" (disabled) | expr = u