// COMSOL Multiphysics 5.1.0.136 model "MHD-backstep .mph"
// 台阶湍流流场
// Outline of the model tree

Parameters
  Vinl = 1[m/s]  // Centerline inlet velocity
  rhof = 1[kg/m^3]  // Density
  muf = 0.5e-2[Pa*s]  // Dynamic viscosity
  B0 = 0.1*Ha*sqrt(1/sigma)
  sigma = 1/(mu0_const)
  Ha = 20

Geometry
  geom1 "Geometry 1" (2D, length unit m)
    r1: Rectangle | size = {1, 0.25}
    r2: Rectangle "矩形 2" | size = {0.25, 0.125}
    dif1: Difference "差集 1" | input = r1; input2 = r2
    fin: Finalize "Form Union"

Materials
  mat1: Common "Material 1" on all domains
    def "Basic"
      density = rhof
      dynamicviscosity = muf
      relpermeability = 1
      relpermittivity = 1
      electricconductivity = sigma

Physics
  spf: TurbulentFlowkeps "Turbulent Flow, k-ε" on domains 1
    dependent variable u = {u, v, w}
    PhysicalModelProperty.TurbulenceModelType = None
    fp1: FluidProperties (default)
    init1: init "Initial Values 1" (default)
    wall1: Wall (default)
    inl1: InletBoundary "Inlet 1" on boundaries 1 | U0in = Vinl; IT = 0.03; LT = 0.07*hc
    out1: OutletBoundary "Outlet 1" on boundaries 6 | NormalFlow = 1
  mf: InductionCurrents "磁场" on all domains
    dependent variable A = {Ax, Ay, Az}
    BackgroundField.SolveFor = ReducedField
    BackgroundField.Ab = {0, 0, -B0*x[Wb/m^2]}
    components.components = inplane
    al1: AmperesLaw "安培定律 1" (default)
    mi1: MagneticInsulation "磁绝缘 1" (default)
    init1: init "初始值 1" (default)
    exvp1: ExternalMagneticVectorPotential "外磁矢势 1" on all boundaries
    vlt1: Velocity "速度（洛伦兹项） 1" on all domains | v_src = root.comp1.u

Multiphysics
  lf1: LorentzForce "洛伦兹力 1" on all domains | EMForce_physics = mf; Plasma_physics = spf

Mesh
  mesh1 "网格 1"
    size: MeshSizeDefault "尺寸"
      table = cfd
      hmax = 0.0168
      hmin = 7.5E-4
      hcurve = 0.4
      hnarrow = 1
      hgrad = 1.2
      hauto = 6
    size1: Size "尺寸 1" on no domains | hmax = 0.067; hmin = 3.0E-4; hcurve = 0.3; hnarrow = 1; hgrad = 1.3; hauto = 5
    size2: Size "尺寸 2" on boundaries 1-6 | hmax = 0.01; hauto = 1; custom = on
    cr1: CornerRefinement "角细化 1" on domains 1 | boundary = boundaries 2-5; minangle = 240; refinement = 0.25
    ftri1: FreeTri "自由剖分三角形网格 1" on remaining entities
      xscale = 1
      yscale = 1
      smoothcontrol = on
      smoothmaxiter = 8
      smoothmaxdepth = 8
    bl1: BndLayer "边界层 1" on domains 1
      sharpcorners = trim
      trimminangle = 240
      trimmaxangle = 20
      splitangle = 240
      splitdivangle = 100
      layerdec = 2
      smoothtransition = on
      smoothmaxiter = 8
      smoothmaxdepth = 16
      blp1: BndLayerProp "边界层属性 1" on boundaries 2-5 | blnlayers = 5

Studies
  std1 "研究 1"
    param: Parametric "参数化扫描" | pname = Ha; plistarr = 0,1,5,10,20,30
    stat: Stationary "稳态"
  std2 "研究 2"
    time: Transient "瞬态" | tlist = range(0,0.1,1)

Solver configurations
  sol1 "解 1" (study std1)
    v1: Variables "因变量 1"
    s1: Stationary "稳态求解器 1"
      fc1: FullyCoupled "全耦合 1"
        linsolver = d1
        dtech = const
        maxiter = 500
        damp = 0.8
        stabacc = cflcmp
        initcfl = 5
        kppid = 0.65
        kdpid = 0.05
        kipid = 0.05
        cfltol = 0.1
      d1: Direct "直接 1" | linsolver = mumps
      p1: Parametric "参数化 1" | sweeptype = sparse; pname = Ha; plistarr = 0,1,5,10,20,30; pcontinuationmode = no

Datasets
  dset1: Solution | solution = sol1

Plots
  pg1: PlotGroup2D "速度 (spf)" | data = dset1
    arws1: ArrowSurface "面箭头 1" | expr = {u, v}; xnumber = 30; ynumber = 30
    surf1: Surface "表面 1" | expr = spf.U
  pg5: PlotGroup2D "二维绘图组 5" | data = dset1
    str1: Streamline "流线 1" on boundaries 1, 2, 4
      expr = {u, v}
      startmethod = coord
      xcoord = 0.3
      ycoord = range(0,0.005,0.25)
    surf1: Surface "表面 1" | expr = spf.U