// COMSOL Multiphysics 5.2.0.166 model "NS_DG_update1.mph"
// NS
// Using P2+P1, and Picard's iteration
// Outline of the model tree
// Unit system: none

Parameters
  nu = 1  // dynamical viscosity
  sigma = 10
  eipsilon = 1
  beta = 1

Variables
  var2 "all_funs_setting"
    uexac = x^2*(x-1)^2*y*(y-1)*(2*y-1)
    vexac = -x*(x-1)*(2*x-1)*y^2*(y-1)^2
    pexac = (2*x-1)*(2*y-1)
    f1 = 2*(2*y-1)*(-3*nu*x^4+6*nu*x^3-6*nu*x^2*y^2+6*nu*x^2*y-3*nu*x^2+6*nu*x*y^2-6*nu*x*y-nu*y^2+nu*y+1)
    f2 = 2*(2*x-1)*(6*nu*x^2*y^2-6*nu*x^2*y+nu*x^2-6*nu*x*y^2+6*nu*x*y-nu*x+3*nu*y^4-6*nu*y^3+3*nu*y^2+1)
    g1 = 0  // (u's)Dirichlet B.C.
    g2 = 0  // (v's)Dirichlet B.C.
    uerr = u-uexac
    verr = v-vexac
    perr = p-pexac
    u_l2err = sqrt(a_int(uerr^2))
    v_l2err = sqrt(a_int(verr^2))
    p_l2err = sqrt(a_int(perr^2))
    uv_l2err = sqrt(u_l2err^2+v_l2err^2)
    u1err = u1-uexac
    v1err = v1-vexac
    u1_l2err = sqrt(a_int(u1err^2))
    v1_l2err = sqrt(a_int(v1err^2))
    u1v1_l2err = sqrt(u1_l2err^2+v1_l2err^2)
  var3 "stokes_init0_setting"
    ujump = up(u)-down(u)
    vjump = up(v)-down(v)
    pjump = up(p)-down(p)
    testujump = test(up(u))-test(down(u))
    testvjump = test(up(v))-test(down(v))
    testpjump = test(up(p))-test(down(p))
    unavg = 0.5*((up(ux)+down(ux))*unx+(up(uy)+down(uy))*uny)  // Expression:1/2*{{(ux,uy) \cdot (unx,uny)}}. Attention: the normal (unx,uny) is just using in the inter edges, (nx, ny) using in boundry edges.
    vnavg = 0.5*((up(vx)+down(vx))*unx+(up(vy)+down(vy))*uny)
    testunavg = 0.5*((test(up(ux))+test(down(ux)))*unx+(test(up(uy))+test(down(uy)))*uny)
    testvnavg = 0.5*((test(up(vx))+test(down(vx)))*unx+(test(up(vy))+test(down(vy)))*uny)
    pavg = 0.5*(up(p)+down(p))
    testpavg = 0.5*(test(up(p))+test(down(p)))
    un = ux*nx+uy*ny  // un is used in boundary edges.
    vn = vx*nx+vy*ny
    testun = test(ux)*nx+test(uy)*ny  // testun is used in boundary edges.
    testvn = test(vx)*nx+test(vy)*ny
  var4 "ns_step1_setting"
    u1jump = up(u1)-down(u1)
    v1jump = up(v1)-down(v1)
    p1jump = up(p1)-down(p1)
    testu1jump = test(up(u1))-test(down(u1))
    testv1jump = test(up(v1))-test(down(v1))
    testp1jump = test(up(p1))-test(down(p1))
    u1navg = 0.5*((up(u1x)+down(u1x))*unx+(up(u1y)+down(u1y))*uny)  // Expression:1/2*{{(u1x,u1y) \cdot (unx,uny)}}. Attention: the normal (unx,uny) is just using in the inter edges, (nx, ny) using in bou1ndry edges.
    v1navg = 0.5*((up(v1x)+down(v1x))*unx+(up(v1y)+down(v1y))*uny)
    testu1navg = 0.5*((test(up(u1x))+test(down(u1x)))*unx+(test(up(u1y))+test(down(u1y)))*uny)
    testv1navg = 0.5*((test(up(v1x))+test(down(v1x)))*unx+(test(up(v1y))+test(down(v1y)))*uny)
    p1avg = 0.5*(up(p1)+down(p1))
    testp1avg = 0.5*(test(up(p1))+test(down(p1)))
    u1n = u1x*nx+u1y*ny  // u1n is used in bou1ndary edges.
    v1n = v1x*nx+v1y*ny
    testu1n = test(u1x)*nx+test(u1y)*ny  // testu1n is used in bou1ndary edges.
    testv1n = test(v1x)*nx+test(v1y)*ny
  var1 "变量 1" (disabled)
    ujump = up(u)-down(u)
    vjump = up(v)-down(v)
    pjump = up(p)-down(p)
    testujump = test(up(u))-test(down(u))
    testvjump = test(up(v))-test(down(v))
    testpjump = test(up(p))-test(down(p))
    unavg = 0.5*((up(ux)+down(ux))*unx+(up(uy)+down(uy))*uny)
    vnavg = 0.5*((up(vx)+down(vx))*unx+(up(vy)+down(vy))*uny)
    testunavg = 0.5*((test(up(ux))+test(down(ux)))*unx+(test(up(uy))+test(down(uy)))*uny)
    testvnavg = 0.5*((test(up(vx))+test(down(vx)))*unx+(test(up(vy))+test(down(vy)))*uny)
    pavg = 0.5*(up(p)+down(p))
    f1 = 2*(2*y - 1)*(- 3*nu*x^4 + 6*nu*x^3 - 6*nu*x^2*y^2 + 6*nu*x^2*y - 3*nu*x^2 + 6*nu*x*y^2 - 6*nu*x*y - nu*y^2 + nu*y + 1)
    f2 = 2*(2*x - 1)*(6*nu*x^2*y^2 - 6*nu*x^2*y + nu*x^2 - 6*nu*x*y^2 + 6*nu*x*y - nu*x + 3*nu*y^4 - 6*nu*y^3 + 3*nu*y^2 + 1)
    uexac = x^2*(x-1)^2*y*(y-1)*(2*y-1)
    g1 = 0
    g2 = 0
    testpavg = 0.5*(test(up(p))+test(down(p)))
    testun = test(ux)*nx+test(uy)*ny
    testvn = test(vx)*nx+test(vy)*ny
    un = ux*nx+uy*ny
    vn = vx*nx+vy*ny
    vexac = -x*(x-1)*(2*x-1)*y^2*(y-1)^2
    uerr = u-uexac
    u_l2err = sqrt(intop1(uerr^2))
    verr = v-vexac
    v_l2err = sqrt(intop1(verr^2))
    uv_l2err = sqrt(u_l2err^2+v_l2err^2)

Couplings
  intop1: Integration "area_int" on all domains | opname = a_int

Geometry
  geom1 "几何 1" (2D, length unit m)
    sq1: Square "正方形 1" | size = 1
    fin: Finalize "形成联合体"

Physics
  u_weak_func: WeakFormPDE "stokes_init0_u" on all domains
    dependent variable u
    ShapeProperty.shapeFunctionType = shdisc
    wfeq1: WeakFormPDE "弱解型偏微分方程 1" (default) | weak = nu*(ux*test(ux)+uy*test(uy))-p*test(ux)-f1*test(u)
    zflx1: ZeroFluxBoundary "零通量 1" (default)
    init1: init "初始值 1" (default) | u = 0
    ibweak1: InteriorBoundaryContribution "网格边界弱贡献 1" on all domains
      weakExpression = nu*(sigma/h^beta)*ujump*testujump-nu*unavg*testujump+nu*eipsilon*testunavg*ujump+pavg*testujump*unx
    weak1: WeakContribution "弱贡献 1" on all boundaries
      integrationOrder = 4
      quadratureFrame = spatial
      weakExpression = nu*sigma/h^beta*u*test(u)-nu*un*test(u)+nu*eipsilon*testun*u+p*test(u)*nx-nu*eipsilon*testun*g1-nu*sigma/h^beta*test(u)*g1
      automaticQuadrature = 1
  v_weak_func: WeakFormPDE "stokes_init0_v" on all domains
    dependent variable v
    ShapeProperty.shapeFunctionType = shdisc
    wfeq1: WeakFormPDE "弱解型偏微分方程 1" (default) | weak = nu*(vx*test(vx)+vy*test(vy))-p*test(vy)-f2*test(v)
    zflx1: ZeroFluxBoundary "零通量 1" (default)
    init1: init "初始值 1" (default) | v = 0
    ibweak1: InteriorBoundaryContribution "网格边界弱贡献 1" on all domains
      weakExpression = nu*(sigma/h^beta)*vjump*testvjump-nu*vnavg*testvjump+nu*eipsilon*testvnavg*vjump+pavg*testvjump*uny
    weak1: WeakContribution "弱贡献 1" on all boundaries
      integrationOrder = 4
      quadratureFrame = spatial
      weakExpression = nu*sigma/h^beta*v*test(v)-nu*vn*test(v)+nu*eipsilon*testvn*v+p*test(v)*ny-nu*eipsilon*testvn*g1-nu*sigma/h^beta*test(v)*g2
      automaticQuadrature = 1
  p_weak_func: WeakFormPDE "stokes_init0_p" on all domains
    dependent variable p
    ShapeProperty.shapeFunctionType = shdisc
    ShapeProperty.order = 1
    wfeq1: WeakFormPDE "弱解型偏微分方程 1" (default) | weak = -test(p)*(ux+vy)+test(p)*p*1e-6
    zflx1: ZeroFluxBoundary "零通量 1" (default)
    init1: init "初始值 1" (default) | p = 0
    ibweak1: InteriorBoundaryContribution "网格边界弱贡献 1" on all domains | weakExpression = testpavg*(ujump*unx+vjump*uny)
    weak1: WeakContribution "弱贡献 1" on all boundaries
      integrationOrder = 4
      quadratureFrame = spatial
      weakExpression = test(p)*(u*nx+v*ny)-test(p)*(g1*nx+g2*ny)
      automaticQuadrature = 1
  u1_weak_func: WeakFormPDE "ns_step1_u1" on all domains
    dependent variable u1
    ShapeProperty.shapeFunctionType = shhwdisc
    wfeq1: WeakFormPDE "弱解型偏微分方程 1" (default)
      weak = nu*(u1x*test(u1x)+u1y*test(u1y))+(u*u1x+v*u1y)*test(u1)+0.5*(ux+vy)*u1*test(u1)-p1*test(u1x)-f1*test(u1)
    zflx1: ZeroFluxBoundary "零通量 1" (default)
    init1: init "初始值 1" (default)
    ibweak1: InteriorBoundaryContribution "网格边界弱贡献 1" on all domains
      weakExpression = nu*(sigma/h^beta)*u1jump*testu1jump-nu*u1navg*testu1jump+nu*eipsilon*testu1navg*u1jump+p1avg*testu1jump*unx
    weak1: WeakContribution "弱贡献 1" on all boundaries
      integrationOrder = 4
      quadratureFrame = spatial
      weakExpression = nu*sigma/h^beta*u1*test(u1)-nu*u1n*test(u1)+nu*eipsilon*testu1n*u1+p1*test(u1)*nx-nu*eipsilon*testu1n*g1-nu*sigma/h^beta*test(u1)*g1
      automaticQuadrature = 1
    ibweak2: InteriorBoundaryContribution "网格边界弱贡献 2" on all domains
      weakExpression = (ux*dnx+uy*dny<0)*(ux*dnx+uy*dny)*test(down(u1))*(down(u1)-up(u1))+(ux*unx+uy*uny<0)*(ux*unx+uy*uny)*test(up(u1))*(up(u1)-down(u1))-0.5*(ujump*unx+vjump*uny)*(0.5*(up(u1*test(u1))+down(u1*test(u1))))
    weak2: WeakContribution "弱贡献 2" on all boundaries
      integrationOrder = 4
      quadratureFrame = spatial
      weakExpression = (ux*dnx+uy*dny<0)*(ux*dnx+uy*dny)*test(down(u1))*(down(u1)-g1)+(ux*unx+uy*uny<0)*(ux*unx+uy*uny)*test(up(u1))*(up(u1)-g1)-0.5*(u*nx+v*ny)*(u1*test(u1))
      automaticQuadrature = 1
  v1_weak_func: WeakFormPDE "ns_step1_v1" on all domains
    dependent variable v1
    wfeq1: WeakFormPDE "弱解型偏微分方程 1" (default)
      weak = nu*(v1x*test(v1x)+v1y*test(v1y))+(u*v1x+v*v1y)*test(v1)+0.5*(ux+vy)*v1*test(v1)-p1*test(v1y)-f2*test(v1)
    zflx1: ZeroFluxBoundary "零通量 1" (default)
    init1: init "初始值 1" (default)
    ibweak1: InteriorBoundaryContribution "网格边界弱贡献 1" on all domains
      weakExpression = nu*(sigma/h^beta)*v1jump*testv1jump-nu*v1navg*testv1jump+nu*eipsilon*testv1navg*v1jump+p1avg*testv1jump*uny
    weak1: WeakContribution "弱贡献 1" on all boundaries
      integrationOrder = 4
      quadratureFrame = spatial
      weakExpression = nu*sigma/h^beta*v1*test(v1)-nu*v1n*test(v1)+nu*eipsilon*testv1n*v1+p1*test(v1)*ny-nu*eipsilon*testv1n*g1-nu*sigma/h^beta*test(v1)*g2
      automaticQuadrature = 1
    ibweak2: InteriorBoundaryContribution "网格边界弱贡献 2" on all domains
      weakExpression = (ux*dnx+uy*dny<0)*(ux*dnx+uy*dny)*test(down(v1))*(down(v1)-up(v1))+(ux*unx+uy*uny<0)*(ux*unx+uy*uny)*test(up(v1))*(up(v1)-down(v1))-0.5*(ujump*unx+vjump*uny)*(0.5*(up(v1*test(v1))+down(v1*test(v1))))
    weak2: WeakContribution "弱贡献 2" on all boundaries
      integrationOrder = 4
      quadratureFrame = spatial
      weakExpression = (ux*dnx+uy*dny<0)*(ux*dnx+uy*dny)*test(down(v1))*(down(v1)-g2)+(ux*unx+uy*uny<0)*(ux*unx+uy*uny)*test(up(v1))*(up(v1)-g2)-0.5*(u*nx+v*ny)*(v1*test(v1))
      automaticQuadrature = 1
  p1_weak_func: WeakFormPDE "ns_step1_p1" on all domains
    dependent variable p1
    wfeq1: WeakFormPDE "弱解型偏微分方程 1" (default) | weak = -test(p1)*(u1x+v1y)+test(p1)*p1*1e-6
    zflx1: ZeroFluxBoundary "零通量 1" (default)
    init1: init "初始值 1" (default)
    ibweak1: InteriorBoundaryContribution "网格边界弱贡献 1" on all domains | weakExpression = testp1avg*(u1jump*unx+v1jump*uny)
    weak1: WeakContribution "弱贡献 1" on all boundaries
      integrationOrder = 4
      quadratureFrame = spatial
      weakExpression = test(p1)*(u1*nx+v1*ny)-test(p1)*(g1*nx+g2*ny)
      automaticQuadrature = 1

Mesh
  mesh1 "网格 1"
    size: MeshSizeDefault "尺寸" | hmax = 1/16; hauto = 5; custom = on
    map1: Map "映射 1" on all domains | adjustedgdistr = on
    conv1: Convert "转换 1" on entire geometry

Studies
  std1 "研究 1"
    stat: Stationary "稳态"
      physselection = u_weak_func
      solve for = {u_weak_func, v_weak_func, p_weak_func}
      mesh = {geom1, mesh1}
  std2 "研究 2"
    stat: Stationary "稳态" | physselection = u_weak_func; solve for = {u1_weak_func, v1_weak_func, p1_weak_func}

Solver configurations
  sol1 "解 1" (study std1)
    v1: Variables "因变量 1"
    s1: Stationary "稳态求解器 1"
      dDef: Direct "直接" | linsolver = mumps
      fc1: FullyCoupled "全耦合 1" | linsolver = dDef
  sol2 "解 2" (study std2)
    v1: Variables "因变量 1"
    s1: Stationary "稳态求解器 1"
      dDef: Direct "直接"
      fc1: FullyCoupled "全耦合 1" | linsolver = dDef

Datasets
  dset1: Solution | solution = sol1
  dset2: Solution | solution = sol2

Plots
  pg1: PlotGroup2D "二维绘图组 1" | data = dset1
    surf1: Surface "表面 1" | expr = pexac
  pg2: PlotGroup2D "二维绘图组 2" | data = dset1
    surf1: Surface "表面 1" | expr = p
  pg3: PlotGroup2D "二维绘图组 3" | data = dset2
    surf1: Surface "表面 1" | expr = u1
  pg4: PlotGroup2D "二维绘图组 4" | data = dset2
    surf1: Surface "表面 1" | expr = v1
  pg5: PlotGroup2D "二维绘图组 5" | data = dset2
    surf1: Surface "表面 1" | expr = p1