// COMSOL Multiphysics 5.2.0.166 model "poisson_DG.mph"
// 未命名
// Outline of the model tree
// Unit system: none

Variables
  var1 "变量 1"
    f = 2*pi^2*sin(pi*x)*sin(pi*y)
    g = 0
    exactsoln = sin(pi*x)*sin(pi*y)
    error = abs(u-exactsoln)
    l2err = error^2
    ujump = up(u)-down(u)
    testujump = test(up(u))-test(down(u))
    unavg = 0.5*((up(ux)+down(ux))*unx+(up(uy)+down(uy))*uny)
    testunavg = 0.5*((test(up(ux))+test(down(ux)))*unx+(test(up(uy))+test(down(uy)))*uny)
    sigma = 10
    l2 = intop1(l2err)
    L2 = sqrt(l2)

Couplings
  intop1: Integration "积分 1" on all domains

Geometry
  geom1 "几何 1" (2D, length unit m)
    sq1: Square "正方形 1" | size = 1
    fin: Finalize "形成联合体"

Physics
  w: WeakFormPDE "弱解型偏微分方程" on all domains
    dependent variable u
    ShapeProperty.shapeFunctionType = shdisc
    wfeq1: WeakFormPDE "弱解型偏微分方程 1" (default) | weak = ux*test(ux)+uy*test(uy)-f*test(u)
    zflx1: ZeroFluxBoundary "零通量 1" (default)
    init1: init "初始值 1" (default)
    ibweak1: InteriorBoundaryContribution "网格边界弱贡献 1" on all domains
      weakExpression = -unavg*testujump-ujump*testunavg+(sigma/h)*ujump*testujump
    weak1: WeakContribution "弱贡献 1" on all boundaries
      integrationOrder = 4
      quadratureFrame = spatial
      weakExpression = -(ux*nx+uy*ny)*test(u)-(u-g)*((test(ux)*nx+test(uy)*ny)-sigma*test(u)/h)
      automaticQuadrature = 1

Mesh
  mesh1 "网格 1"
    size: MeshSizeDefault "尺寸" | hmax = 1; hauto = 5; custom = on
    map1: Map "映射 1" on remaining entities | adjustedgdistr = on
      size1: Size "尺寸 1" on entire geometry | hmax = 1; hauto = 5; custom = on
    conv1: Convert "转换 1" on entire geometry | splitmethod = diagonal

Studies
  std1 "研究 1"
    stat: Stationary "稳态"

Solver configurations
  sol1 "解 1" (study std1)
    v1: Variables "因变量 1"
    s1: Stationary "稳态求解器 1"
      dDef: Direct "直接"
      fc1: FullyCoupled "全耦合 1" | linsolver = dDef

Datasets
  dset1: Solution | solution = sol1

Plots
  pg1: PlotGroup2D "二维绘图组 1" | data = dset1
    surf1: Surface "表面 1" | expr = u

Exports
  data1: Data "数据 1"
    data = dset1
    expr = u
    descr = 因变量 u
    filename = /home/yczhang/Documents/comsol_DG_examples/poisson_DG/Untitled.txt
    level = fromdataset
    lagorder = 3