// COMSOL Multiphysics 5.2.0.166 model "poisson_DG_3D.mph"
// 未命名
// Outline of the model tree

Variables
  var1 "变量 1"
    f = 12*pi*pi*cos(2*pi*x)*cos(2*pi*y)*cos(2*pi*z)
    g = 0
    uexac = cos(2*pi*x)*cos(2*pi*y)*cos(2*pi*z)
    error = abs(u-uexac)
    l2err = error^2
    ujump = up(u)-down(u)
    testujump = test(up(u))-test(down(u))
    unavg = 0.5*((up(ux)+down(ux))*ux+(up(uy)+down(uy))*uy+(up(uz)+down(uz))*uz)
    testunavg = 0.5*((test(up(ux))+test(down(ux)))*ux+(test(up(uy))+test(down(uy)))*uy+(test(up(uz))+test(down(uz)))*uz)
    sigma = 10
    l2 = intop1(l2err)
    L2 = sqrt(l2)
    beta = 3

Couplings
  intop1: Integration "积分 1" on no domains

Geometry
  geom1 "几何 1" (3D, length unit m)
    blk1: Block "长方体 1" | size = {1, 1, 1}
    fin: Finalize "形成联合体"

Physics
  w: WeakFormPDE "弱解型偏微分方程" on all domains
    dependent variable u
    ShapeProperty.shapeFunctionType = shdisc
    wfeq1: WeakFormPDE "弱解型偏微分方程 1" (default) | weak = ux*test(ux)+uy*test(uy)+uz*test(uz)-f*test(u)
    zflx1: ZeroFluxBoundary "零通量 1" (default)
    init1: init "初始值 1" (default)
    ibweak1: InteriorBoundaryContribution "网格边界弱贡献 1" on all domains
      weakExpression = -unavg*testujump-ujump*testunavg+(sigma/h^beta)*ujump*testujump
    weak1: WeakContribution "弱贡献 1" on no boundaries
      integrationOrder = 4
      quadratureFrame = spatial
      weakExpression = -(ux*nx+uy*ny+uz*nz)*test(u)-(u-g)*((test(ux)*nx+test(uy)*ny+test(uz)*nz)-(sigma/h^beta)*test(u))
      automaticQuadrature = 1

Mesh
  mesh1 "网格 1" (physics-controlled)
    size: MeshSizeDefault "尺寸" | hauto = 5

Studies
  std1 "研究 1"
    stat: Stationary "稳态"

Solver configurations
  sol1 "解 1" (study std1)
    v1: Variables "因变量 1"
    s1: Stationary "稳态求解器 1"
      dDef: Direct "直接"
      fc1: FullyCoupled "全耦合 1" | linsolver = dDef
      prob1: SolverProblem "信息 1"
        error1: SolverError "错误 1"

Datasets
  dset1: Solution | solution = sol1