// COMSOL Multiphysics 5.2.0.166 model "Stokes_update2_3D.mph"
// 未命名
// Outline of the model tree

Parameters
  nu = 1  // dynamical viscosity
  sigma = 10
  eipsilon = 1
  beta = 2
  c_par = 1

Variables
  var1 "global_pars"
    f1 = -nu * 6 * x - 2
    f2 = nu * 12 * y
    f3 = -nu * 6 * z
    g1 = uexac
    g2 = vexac
    g3 = wexac
    uexac = x^3
    vexac = -3*y*(x^2+z^2)
    wexac = z^3
    pexac = 1-2*x
    uerr = u-uexac
    verr = v-vexac
    werr = w-wexac
    u_l2err = sqrt(intop1(uerr^2))
    v_l2err = sqrt(intop1(verr^2))
    w_l2err = sqrt(intop1(werr^2))
    uvw_l2err = sqrt(u_l2err^2+v_l2err^2+w_l2err^2)
  var2 "uvw_pars"
    ujump = up(u)-down(u)
    vjump = up(v)-down(v)
    wjump = up(w)-down(w)
    pjump = up(p)-down(p)
    testujump = test(up(u))-test(down(u))
    testvjump = test(up(v))-test(down(v))
    testwjump = test(up(w))-test(down(w))
    testpjump = test(up(p))-test(down(p))
    unavg = 0.5*((up(ux)+down(ux))*unx+(up(uy)+down(uy))*uny+(up(uz)+down(uz))*unz)
    vnavg = 0.5*((up(vx)+down(vx))*unx+(up(vy)+down(vy))*uny+(up(vz)+down(vz))*unz)
    wnavg = 0.5*((up(wx)+down(wx))*unx+(up(wy)+down(wy))*uny+(up(wz)+down(wz))*unz)
    testunavg = 0.5*((test(up(ux))+test(down(ux)))*unx+(test(up(uy))+test(down(uy)))*uny+(test(up(uz))+test(down(uz)))*unz)
    testvnavg = 0.5*((test(up(vx))+test(down(vx)))*unx+(test(up(vy))+test(down(vy)))*uny+(test(up(vz))+test(down(vz)))*unz)
    testwnavg = 0.5*((test(up(wx))+test(down(wx)))*unx+(test(up(wy))+test(down(wy)))*uny+(test(up(wz))+test(down(wz)))*unz)
    pavg = 0.5*(up(p)+down(p))
    testpavg = 0.5*(test(up(p))+test(down(p)))
    testun = test(ux)*nx+test(uy)*ny+test(uz)*nz
    testvn = test(vx)*nx+test(vy)*ny+test(vz)*nz
    testwn = test(wx)*nx+test(wy)*ny+test(wz)*nz
    un = ux*nx+uy*ny+uz*nz
    vn = vx*nx+vy*ny+vz*nz
    wn = wx*nx+wy*ny+wz*nz

Couplings
  intop1: Integration "积分 1" on all domains

Geometry
  geom1 "几何 1" (3D, length unit m)
    blk1: Block "长方体 1" | size = {1, 1, 1}
    fin: Finalize "形成联合体"

Physics
  u_weak_form: WeakFormPDE "stokes_u_func" on all domains
    dependent variable u
    ShapeProperty.shapeFunctionType = shdisc
    wfeq1: WeakFormPDE "弱解型偏微分方程 1" (default) | weak = nu*(ux*test(ux)+uy*test(uy)+uz*test(uz))-p*test(ux)-f1*test(u)
    zflx1: ZeroFluxBoundary "零通量 1" (default)
    init1: init "初始值 1" (default) | u = 1
    ibweak1: InteriorBoundaryContribution "网格边界弱贡献 1" on all domains
      weakExpression = nu*(sigma/h^beta)*ujump*testujump-nu*unavg*testujump+nu*eipsilon*testunavg*ujump+pavg*testujump*unx
    weak1: WeakContribution "弱贡献 1" on all boundaries
      integrationOrder = 4
      quadratureFrame = spatial
      weakExpression = nu*sigma/h^beta*u*test(u)-nu*un*test(u)+nu*eipsilon*testun*u+p*test(u)*nx-nu*eipsilon*testun*g1-nu*sigma/h^beta*test(u)*g1
      automaticQuadrature = 1
  v_weak_form: WeakFormPDE "stokes_v_func" on all domains
    dependent variable v
    ShapeProperty.shapeFunctionType = shdisc
    wfeq1: WeakFormPDE "弱解型偏微分方程 1" (default) | weak = nu*(vx*test(vx)+vy*test(vy)+vz*test(vz))-p*test(vy)-f2*test(v)
    zflx1: ZeroFluxBoundary "零通量 1" (default)
    init1: init "初始值 1" (default) | v = 1
    ibweak1: InteriorBoundaryContribution "网格边界弱贡献 1" on all domains
      weakExpression = nu*(sigma/h^beta)*vjump*testvjump-nu*vnavg*testvjump+nu*eipsilon*testvnavg*vjump+pavg*testvjump*uny
    weak1: WeakContribution "弱贡献 1" on all boundaries
      integrationOrder = 4
      quadratureFrame = spatial
      weakExpression = nu*sigma/h^beta*v*test(v)-nu*vn*test(v)+nu*eipsilon*testvn*v+p*test(v)*ny-nu*eipsilon*testvn*g2-nu*sigma/h^beta*test(v)*g2
      automaticQuadrature = 1
  w_weak_form: WeakFormPDE "stokes_w_func" on all domains
    dependent variable w
    ShapeProperty.shapeFunctionType = shdisc
    wfeq1: WeakFormPDE "弱解型偏微分方程 1" (default) | weak = nu*(wx*test(wx)+wy*test(wy)+wz*test(wz))-p*test(wz)-f3*test(w)
    zflx1: ZeroFluxBoundary "零通量 1" (default)
    init1: init "初始值 1" (default) | w = 1
    ibweak1: InteriorBoundaryContribution "网格边界弱贡献 1" on all domains
      weakExpression = nu*(sigma/h^beta)*wjump*testwjump-nu*wnavg*testwjump+nu*eipsilon*testwnavg*wjump+pavg*testwjump*unz
    weak1: WeakContribution "弱贡献 1" on all boundaries
      integrationOrder = 4
      quadratureFrame = spatial
      weakExpression = nu*sigma/h^beta*w*test(w)-nu*wn*test(w)+nu*eipsilon*testwn*w+p*test(w)*nz-nu*eipsilon*testwn*g3-nu*sigma/h^beta*test(w)*g3
      automaticQuadrature = 1
  p_weak_form: WeakFormPDE "stokes_p_func" on all domains
    dependent variable p
    ShapeProperty.shapeFunctionType = shdisc
    ShapeProperty.order = 1
    wfeq1: WeakFormPDE "弱解型偏微分方程 1" (default) | weak = -test(p)*(ux+vy+wz)+test(p)*p*1e-6
    zflx1: ZeroFluxBoundary "零通量 1" (default)
    init1: init "初始值 1" (default) | p = 1
    ibweak1: InteriorBoundaryContribution "网格边界弱贡献 1" on all domains
      weakExpression = testpavg*(ujump*unx+vjump*uny+wjump*unz)
    weak1: WeakContribution "弱贡献 1" on all boundaries
      integrationOrder = 4
      quadratureFrame = spatial
      weakExpression = test(p)*(u*nx+v*ny+w*nz)-test(p)*(g1*nx+g2*ny+g3*nz)
      automaticQuadrature = 1

Mesh
  mesh1 "网格 1" (physics-controlled)
    size: MeshSizeDefault "尺寸" | hauto = 7

Studies
  std1 "研究 1"
    stat: Stationary "稳态" | usestoresel = all

Solver configurations
  sol1 "解 1" (study std1)
    v1: Variables "因变量 1"
    s1: Stationary "稳态求解器 1"
      dDef: Direct "直接" | linsolver = spooles
      se1: Segregated "分离 1"
        ss1: SegregatedStep "分离步 1" | segvar = {comp1_p}; linsolver = dDef
        ss2: SegregatedStep "分离步 2" | segvar = {comp1_u}; linsolver = dDef
        ss3: SegregatedStep "分离步 3" | segvar = {comp1_v}; linsolver = dDef
        ss4: SegregatedStep "分离步 4" | segvar = {comp1_w}; linsolver = dDef

Datasets
  dset1: Solution | solution = sol1