// COMSOL Multiphysics 5.2.0.166 model "Stokes_damping_update0.mph"
// Stokes
// 求解stokes方程，分别使用CFD与弱形式
// P2+P1
// Outline of the model tree
// Unit system: none

Parameters
  nu = 1  // dynamical viscosity
  sigma = 10
  eipsilon = -1
  beta = 1  // penalty term
  alpha_n = 1  // nolinear term's coefficient
  beta_n = 3  // nolinear term's exponent

Variables
  var1 "变量 1"
    ujump = up(u)-down(u)
    vjump = up(v)-down(v)
    pjump = up(p)-down(p)
    testujump = test(up(u))-test(down(u))
    testvjump = test(up(v))-test(down(v))
    testpjump = test(up(p))-test(down(p))
    unavg = 0.5*((up(ux)+down(ux))*unx+(up(uy)+down(uy))*uny)
    vnavg = 0.5*((up(vx)+down(vx))*unx+(up(vy)+down(vy))*uny)
    testunavg = 0.5*((test(up(ux))+test(down(ux)))*unx+(test(up(uy))+test(down(uy)))*uny)
    testvnavg = 0.5*((test(up(vx))+test(down(vx)))*unx+(test(up(vy))+test(down(vy)))*uny)
    pavg = 0.5*(up(p)+down(p))
    f1 = 2*(2*y - 1)*(- 3*nu*x^4 + 6*nu*x^3 - 6*nu*x^2*y^2 + 6*nu*x^2*y - 3*nu*x^2 + 6*nu*x*y^2 - 6*nu*x*y - nu*y^2 + nu*y + 1)
    f2 = 2*(2*x - 1)*(6*nu*x^2*y^2 - 6*nu*x^2*y + nu*x^2 - 6*nu*x*y^2 + 6*nu*x*y - nu*x + 3*nu*y^4 - 6*nu*y^3 + 3*nu*y^2 + 1)
    uexac = x^2*(x-1)^2*y*(y-1)*(2*y-1)
    g1 = 0
    g2 = 0
    testpavg = 0.5*(test(up(p))+test(down(p)))
    testun = test(ux)*nx+test(uy)*ny
    testvn = test(vx)*nx+test(vy)*ny
    un = ux*nx+uy*ny
    vn = vx*nx+vy*ny
    vexac = -x*(x-1)*(2*x-1)*y^2*(y-1)^2
    uerr = u-uexac
    u_l2err = sqrt(intop1(uerr^2))
    verr = v-vexac
    v_l2err = sqrt(intop1(verr^2))
    uv_l2err = sqrt(u_l2err^2+v_l2err^2)

Couplings
  intop1: Integration "积分 1" on all domains

Geometry
  geom1 "几何 1" (2D, length unit m)
    sq1: Square "正方形 1" | size = 1
    fin: Finalize "形成联合体"

Physics
  u: WeakFormPDE "弱解型偏微分方程_u" on all domains
    dependent variable u
    ShapeProperty.shapeFunctionType = shdisc
    wfeq1: WeakFormPDE "弱解型偏微分方程 1" (default) | weak = nu*(ux*test(ux)+uy*test(uy))-p*test(ux)-f1*test(u)
    zflx1: ZeroFluxBoundary "零通量 1" (default)
    init1: init "初始值 1" (default) | u = 0
    ibweak1: InteriorBoundaryContribution "网格边界弱贡献 1" on all domains
      weakExpression = nu*(sigma/h^beta)*ujump*testujump-nu*unavg*testujump+nu*eipsilon*testunavg*ujump+pavg*testujump*unx
    weak1: WeakContribution "弱贡献 1" on all boundaries
      integrationOrder = 4
      quadratureFrame = spatial
      weakExpression = nu*sigma/h^beta*u*test(u)-nu*un*test(u)+nu*eipsilon*testun*u+p*test(u)*nx-nu*eipsilon*testun*g1-nu*sigma/h^beta*test(u)*g1
      automaticQuadrature = 1
  v: WeakFormPDE "弱解型偏微分方程_v" on all domains
    dependent variable v
    ShapeProperty.shapeFunctionType = shdisc
    wfeq1: WeakFormPDE "弱解型偏微分方程 1" (default) | weak = nu*(vx*test(vx)+vy*test(vy))-p*test(vy)-f2*test(v)
    zflx1: ZeroFluxBoundary "零通量 1" (default)
    init1: init "初始值 1" (default) | v = 0
    ibweak1: InteriorBoundaryContribution "网格边界弱贡献 1" on all domains
      weakExpression = nu*(sigma/h^beta)*vjump*testvjump-nu*vnavg*testvjump+nu*eipsilon*testvnavg*vjump+pavg*testvjump*uny
    weak1: WeakContribution "弱贡献 1" on all boundaries
      integrationOrder = 4
      quadratureFrame = spatial
      weakExpression = nu*sigma/h^beta*v*test(v)-nu*vn*test(v)+nu*eipsilon*testvn*v+p*test(v)*ny-nu*eipsilon*testvn*g2-nu*sigma/h^beta*test(v)*g2
      automaticQuadrature = 1
  p: WeakFormPDE "弱解型偏微分方程_p" on all domains
    dependent variable p
    ShapeProperty.shapeFunctionType = shdisc
    ShapeProperty.order = 1
    wfeq1: WeakFormPDE "弱解型偏微分方程 1" (default) | weak = -test(p)*(ux+vy)+test(p)*p*1e-6
    zflx1: ZeroFluxBoundary "零通量 1" (default)
    init1: init "初始值 1" (default) | p = 0
    ibweak1: InteriorBoundaryContribution "网格边界弱贡献 1" on all domains | weakExpression = testpavg*(ujump*unx+vjump*uny)
    weak1: WeakContribution "弱贡献 1" on all boundaries
      integrationOrder = 4
      quadratureFrame = spatial
      weakExpression = test(p)*(u*nx+v*ny)-test(p)*(g1*nx+g2*ny)
      automaticQuadrature = 1

Mesh
  mesh1 "网格 1"
    size: MeshSizeDefault "尺寸" | hmax = 1/4; hauto = 5; custom = on
    map1: Map "映射 1" on all domains | adjustedgdistr = on
    conv1: Convert "转换 1" on entire geometry
  mesh2 "网格 2" (physics-controlled)
    size: MeshSizeDefault "尺寸" | hauto = 5

Studies
  std1 "研究 1"
    stat: Stationary "稳态" | mesh = {geom1, mesh1}

Solver configurations
  sol1 "解 1" (study std1)
    v1: Variables "因变量 1"
    s1: Stationary "稳态求解器 1"
      dDef: Direct "直接" | linsolver = mumps
      fc1: FullyCoupled "全耦合 1" | linsolver = dDef

Datasets
  dset1: Solution | solution = sol1

Plots
  pg1: PlotGroup2D "二维绘图组 1" | data = dset1
    surf1: Surface "表面 1" | expr = uv_l2err
  pg2: PlotGroup2D "二维绘图组 2" | data = dset1
    surf1: Surface "表面 1" | expr = uv_l2err