// COMSOL Multiphysics 5.2.0.166 model "Stokes_damping_update1.mph"
// Stokes
// 求解stokes方程，分别使用CFD与弱形式
// P2+P1
// Outline of the model tree
// Unit system: none

Parameters
  nu = 1  // dynamical viscosity
  sigma = 10
  eipsilon = -1
  beta = 1  // penalty term
  alpha_ = 1  // nolinear term's coefficient
  beta_ = 3  // nolinear term's exponent

Variables
  var2 "exac-uvp_rhs_bc"
    uexac = x^2*(x-1)^2*y*(y-1)*(2*y-1)
    vexac = -x*(x-1)*(2*x-1)*y^2*(y-1)^2
    pexac = (2*x-1)*(2*y-1)
    f1 = 4*y-nu*(2*y*(2*y-1)*(x-1)^2*(y-1)+2*x^2*y*(2*y-1)*(y-1)+4*x*y*(2*x-2)*(2*y-1)*(y-1))-nu*(4*x^2*(x-1)^2*(y-1)+2*x^2*(2*y-1)*(x-1)^2+4*x^2*y*(x-1)^2)+alpha_*x^2*y*(2*y-1)*(x-1)^2*(y-1)*((x^2*y^4*(2*x-1)^2*(x-1)^2*(y-1)^4+x^4*y^2*(2*y-1)^2*(x-1)^4*(y-1)^2)^(1/2))^(beta_-2)-2
    f2 = 4*x + nu*(4*y^2*(x - 1)*(y - 1)^2 + 2*y^2*(2*x - 1)*(y - 1)^2 + 4*x*y^2*(y - 1)^2) + nu*(2*x*(2*x - 1)*(x - 1)*(y - 1)^2 + 2*x*y^2*(2*x - 1)*(x - 1) + 4*x*y*(2*x - 1)*(2*y - 2)*(x - 1)) - alpha_*x*y^2*(2*x - 1)*(x - 1)*(y - 1)^2*((x^2*y^4*(2*x - 1)^2*(x - 1)^2*(y - 1)^4 + x^4*y^2*(2*y - 1)^2*(x - 1)^4*(y - 1)^2)^(1/2))^(beta_ - 2) - 2
    g1 = 0
    g2 = 0
  var1 "stokes_damping_step0_vars"
    ujump = up(u)-down(u)
    vjump = up(v)-down(v)
    pjump = up(p)-down(p)
    testujump = test(up(u))-test(down(u))
    testvjump = test(up(v))-test(down(v))
    testpjump = test(up(p))-test(down(p))
    unavg = 0.5*((up(ux)+down(ux))*unx+(up(uy)+down(uy))*uny)
    vnavg = 0.5*((up(vx)+down(vx))*unx+(up(vy)+down(vy))*uny)
    testunavg = 0.5*((test(up(ux))+test(down(ux)))*unx+(test(up(uy))+test(down(uy)))*uny)
    testvnavg = 0.5*((test(up(vx))+test(down(vx)))*unx+(test(up(vy))+test(down(vy)))*uny)
    pavg = 0.5*(up(p)+down(p))
    testpavg = 0.5*(test(up(p))+test(down(p)))
    testun = test(ux)*nx+test(uy)*ny
    testvn = test(vx)*nx+test(vy)*ny
    un = ux*nx+uy*ny
    vn = vx*nx+vy*ny
    uerr = u-uexac
    u_l2err = sqrt(intop1(uerr^2))
    verr = v-vexac
    v_l2err = sqrt(intop1(verr^2))
    uv_l2err = sqrt(u_l2err^2+v_l2err^2)
    p_l2err = sqrt(intop1((p-pexac)^2))
  var3 "stokes_damping_step1_vars"
    u1jump = up(u1)-down(u1)
    v1jump = up(v1)-down(v1)
    p1jump = up(p1)-down(p1)
    testu1jump = test(up(u1))-test(down(u1))
    testv1jump = test(up(v1))-test(down(v1))
    testp1jump = test(up(p1))-test(down(p1))
    u1navg = 0.5*((up(u1x)+down(u1x))*unx+(up(u1y)+down(u1y))*uny)
    v1navg = 0.5*((up(v1x)+down(v1x))*unx+(up(v1y)+down(v1y))*uny)
    testu1navg = 0.5*((test(up(u1x))+test(down(u1x)))*unx+(test(up(u1y))+test(down(u1y)))*uny)
    testv1navg = 0.5*((test(up(v1x))+test(down(v1x)))*unx+(test(up(v1y))+test(down(v1y)))*uny)
    p1avg = 0.5*(up(p1)+down(p1))
    testp1avg = 0.5*(test(up(p1))+test(down(p1)))
    testu1n = test(u1x)*nx+test(u1y)*ny
    testv1n = test(v1x)*nx+test(v1y)*ny
    u1n = u1x*nx+u1y*ny
    v1n = v1x*nx+v1y*ny
    u1err = u1-uexac
    u1_l2err = sqrt(intop1(u1err^2))
    v1err = v1-vexac
    v1_l2err = sqrt(intop1(v1err^2))
    u1v1_l2err = sqrt(u1_l2err^2+v1_l2err^2)
    p1_l2err = sqrt(intop1((p1-pexac)^2))
    u1v1_h1err = sqrt(intop1((u1x-d(uexac,x))^2+(u1y-d(uexac,y))^2+(v1x-d(vexac,x))^2+(v1y-d(vexac,y))^2))
  var4 "stokes_damping_step2_vars"
    u2jump = up(u2)-down(u2)
    v2jump = up(v2)-down(v2)
    p2jump = up(p2)-down(p2)
    testu2jump = test(up(u2))-test(down(u2))
    testv2jump = test(up(v2))-test(down(v2))
    testp2jump = test(up(p2))-test(down(p2))
    u2navg = 0.5*((up(u2x)+down(u2x))*unx+(up(u2y)+down(u2y))*uny)
    v2navg = 0.5*((up(v2x)+down(v2x))*unx+(up(v2y)+down(v2y))*uny)
    testu2navg = 0.5*((test(up(u2x))+test(down(u2x)))*unx+(test(up(u2y))+test(down(u2y)))*uny)
    testv2navg = 0.5*((test(up(v2x))+test(down(v2x)))*unx+(test(up(v2y))+test(down(v2y)))*uny)
    p2avg = 0.5*(up(p2)+down(p2))
    testp2avg = 0.5*(test(up(p2))+test(down(p2)))
    testu2n = test(u2x)*nx+test(u2y)*ny
    testv2n = test(v2x)*nx+test(v2y)*ny
    u2n = u2x*nx+u2y*ny
    v2n = v2x*nx+v2y*ny
    u2err = u2-uexac
    u2_l2err = sqrt(intop2(u2err^2))
    v2err = v2-vexac
    v2_l2err = sqrt(intop2(v2err^2))
    u2v2_l2err = sqrt(u2_l2err^2+v2_l2err^2)
    p2_l2err = sqrt(intop2((p2-pexac)^2))

Couplings
  intop1: Integration "积分 1" on all domains

Geometry
  geom1 "几何 1" (2D, length unit m)
    sq1: Square "正方形 1" | size = 1
    fin: Finalize "形成联合体"

Physics
  u_weak_func: WeakFormPDE "stokes_damping_step0_u" on all domains
    dependent variable u
    ShapeProperty.shapeFunctionType = shdisc
    wfeq1: WeakFormPDE "弱解型偏微分方程 1" (default) | weak = nu*(ux*test(ux)+uy*test(uy))+u*test(u)-p*test(ux)-f1*test(u)
    zflx1: ZeroFluxBoundary "零通量 1" (default)
    init1: init "初始值 1" (default) | u = 0
    ibweak1: InteriorBoundaryContribution "网格边界弱贡献 1" on all domains
      weakExpression = nu*(sigma/h^beta)*ujump*testujump-nu*unavg*testujump+nu*eipsilon*testunavg*ujump+pavg*testujump*unx
    weak1: WeakContribution "弱贡献 1" on all boundaries
      integrationOrder = 4
      quadratureFrame = spatial
      weakExpression = nu*sigma/h^beta*u*test(u)-nu*un*test(u)+nu*eipsilon*testun*u+p*test(u)*nx-nu*eipsilon*testun*g1-nu*sigma/h^beta*test(u)*g1
      automaticQuadrature = 1
  v_weak_func: WeakFormPDE "stokes_damping_step0_v" on all domains
    dependent variable v
    ShapeProperty.shapeFunctionType = shdisc
    wfeq1: WeakFormPDE "弱解型偏微分方程 1" (default) | weak = nu*(vx*test(vx)+vy*test(vy))+v*test(v)-p*test(vy)-f2*test(v)
    zflx1: ZeroFluxBoundary "零通量 1" (default)
    init1: init "初始值 1" (default) | v = 0
    ibweak1: InteriorBoundaryContribution "网格边界弱贡献 1" on all domains
      weakExpression = nu*(sigma/h^beta)*vjump*testvjump-nu*vnavg*testvjump+nu*eipsilon*testvnavg*vjump+pavg*testvjump*uny
    weak1: WeakContribution "弱贡献 1" on all boundaries
      integrationOrder = 4
      quadratureFrame = spatial
      weakExpression = nu*sigma/h^beta*v*test(v)-nu*vn*test(v)+nu*eipsilon*testvn*v+p*test(v)*ny-nu*eipsilon*testvn*g2-nu*sigma/h^beta*test(v)*g2
      automaticQuadrature = 1
  p_weak_func: WeakFormPDE "stokes_damping_step0_p" on all domains
    dependent variable p
    ShapeProperty.shapeFunctionType = shdisc
    ShapeProperty.order = 1
    wfeq1: WeakFormPDE "弱解型偏微分方程 1" (default) | weak = -test(p)*(ux+vy)+test(p)*p*1e-6
    zflx1: ZeroFluxBoundary "零通量 1" (default)
    init1: init "初始值 1" (default) | p = 0
    ibweak1: InteriorBoundaryContribution "网格边界弱贡献 1" on all domains | weakExpression = testpavg*(ujump*unx+vjump*uny)
    weak1: WeakContribution "弱贡献 1" on all boundaries
      integrationOrder = 4
      quadratureFrame = spatial
      weakExpression = test(p)*(u*nx+v*ny)-test(p)*(g1*nx+g2*ny)
      automaticQuadrature = 1
  u1_weak_func: WeakFormPDE "stokes_damping_step1_u1" on all domains
    dependent variable u1
    ShapeProperty.shapeFunctionType = shdisc
    wfeq1: WeakFormPDE "弱解型偏微分方程 1" (default)
      weak = nu*(u1x*test(u1x)+u1y*test(u1y))+alpha_*(sqrt(u^2+v^2))^beta_*u1*test(u1)-p1*test(u1x)-f1*test(u1)
    zflx1: ZeroFluxBoundary "零通量 1" (default)
    init1: init "初始值 1" (default)
    ibweak1: InteriorBoundaryContribution "网格边界弱贡献 1" on all domains
      weakExpression = nu*(sigma/h^beta)*u1jump*testu1jump-nu*u1navg*testu1jump+nu*eipsilon*testu1navg*u1jump+p1avg*testu1jump*unx
    weak1: WeakContribution "弱贡献 1" on all boundaries
      integrationOrder = 4
      quadratureFrame = spatial
      weakExpression = nu*sigma/h^beta*u1*test(u1)-nu*u1n*test(u1)+nu*eipsilon*testu1n*u1+p1*test(u1)*nx-nu*eipsilon*testu1n*g1-nu*sigma/h^beta*test(u1)*g1
      automaticQuadrature = 1
  v1_weak_func: WeakFormPDE "stokes_damping_step1_v1" on all domains
    dependent variable v1
    ShapeProperty.shapeFunctionType = shdisc
    wfeq1: WeakFormPDE "弱解型偏微分方程 1" (default)
      weak = nu*(v1x*test(v1x)+v1y*test(v1y))+alpha_*(sqrt(u^2+v^2))^beta_*v1*test(v1)-p1*test(v1y)-f2*test(v1)
    zflx1: ZeroFluxBoundary "零通量 1" (default)
    init1: init "初始值 1" (default)
    ibweak1: InteriorBoundaryContribution "网格边界弱贡献 1" on all domains
      weakExpression = nu*(sigma/h^beta)*v1jump*testv1jump-nu*v1navg*testv1jump+nu*eipsilon*testv1navg*v1jump+p1avg*testv1jump*uny
    weak1: WeakContribution "弱贡献 1" on all boundaries
      integrationOrder = 4
      quadratureFrame = spatial
      weakExpression = nu*sigma/h^beta*v1*test(v1)-nu*v1n*test(v1)+nu*eipsilon*testv1n*v1+p1*test(v1)*ny-nu*eipsilon*testv1n*g2-nu*sigma/h^beta*test(v1)*g2
      automaticQuadrature = 1
  p1_weak_func: WeakFormPDE "stokes_damping_step1_p1" on all domains
    dependent variable p1
    ShapeProperty.shapeFunctionType = shdisc
    ShapeProperty.order = 1
    wfeq1: WeakFormPDE "弱解型偏微分方程 1" (default) | weak = -test(p1)*(u1x+v1y)+test(p1)*p1*1e-6
    zflx1: ZeroFluxBoundary "零通量 1" (default)
    init1: init "初始值 1" (default)
    ibweak1: InteriorBoundaryContribution "网格边界弱贡献 1" on all domains | weakExpression = testp1avg*(u1jump*unx+v1jump*uny)
    weak1: WeakContribution "弱贡献 1" on all boundaries
      integrationOrder = 4
      quadratureFrame = spatial
      weakExpression = test(p1)*(u1*nx+v1*ny)-test(p1)*(g1*nx+g2*ny)
      automaticQuadrature = 1

Mesh
  mesh1 "网格 1"
    size: MeshSizeDefault "尺寸" | hmax = 1/64; hauto = 5; custom = on
    map1: Map "映射 1" on all domains | adjustedgdistr = on
    conv1: Convert "转换 1" on entire geometry

Studies
  std1 "study1_solve_uvp"
    stat: Stationary "稳态"
      physselection = u_weak_func
      solve for = {u_weak_func, v_weak_func, p_weak_func}
      mesh = {geom1, mesh1}
  std2 "study2_solve_u1v1p1"
    stat: Stationary "稳态" | solve for = {u1_weak_func, v1_weak_func, p1_weak_func}; mesh = {geom1, mesh1}

Solver configurations
  sol1 "解 1" (study std1)
    v1: Variables "因变量 1"
    s1: Stationary "稳态求解器 1"
      dDef: Direct "直接" | linsolver = mumps
      fc1: FullyCoupled "全耦合 1" | linsolver = dDef
  sol2 "解 2" (study std2)
    v1: Variables "因变量 1"
    s1: Stationary "稳态求解器 1"
      dDef: Direct "直接"
      fc1: FullyCoupled "全耦合 1" | linsolver = dDef

Datasets
  dset1: Solution | solution = sol1
  dset2: Solution | solution = sol2

Plots
  pg1: PlotGroup2D "二维绘图组 1" | data = dset1
    surf1: Surface "表面 1" | expr = uv_l2err
  pg2: PlotGroup2D "二维绘图组 2" | data = dset1
    surf1: Surface "表面 1" | expr = uv_l2err
  pg3: PlotGroup2D "二维绘图组 3" | data = dset2
    surf1: Surface "表面 1" | expr = u1v1_h1err
  pg4: PlotGroup2D "二维绘图组 4" | data = dset2
    surf1: Surface "表面 1" | expr = v1
  pg5: PlotGroup2D "二维绘图组 5" | data = dset2
    surf1: Surface "表面 1" | expr = p1